# sys gmsh part.step -clcurv -3 -o gmsh.inp -order 2

sys gmsh part.geo
read gmsh.inp
ulin gmsh without virtual topology
# remove surface elements
zap +CPS6
plot f all n
view elem
rot y
rot d 20
zoom 2
plus n all
hcpy png
sys mv hcpy_1.png Refs/mesh.png
frame
zoom 5
rot y
rot u 20
tra l 30
tra d 30
plot f all n
plus n all
hcpy png
sys mv hcpy_2.png Refs/mesh1.png
del mesh

sys gmsh partVT.geo
read gmshVT.inp new
ulin gmsh with virtual topology
# remove surface elements
zap +CPS6
plot f all n
view elem
frame
rot y
rot d 20
zoom 2
plus n all
hcpy png
sys mv hcpy_3.png Refs/VTmesh.png
#break
frame
zoom 5
rot y
rot u 20
tra l 30
tra d 30
plot f all n
plus n all
hcpy png
sys mv hcpy_4.png Refs/VTmesh1.png
