read solve_acd.frd new

view disp
ds -2 e 1
view elem
copy all base tra 0 0 0
copy all new mir x
copy all new mir y
plot ev base
plus e new n
frame
rot y
rot r 95
rot u 2
zoom 10
view sh off
plot ev base
plus e new n
hcpy png Refs/Sxx_acd
