# run param.py pre.fbd.par
#
# <Dia=1.>         Diameter
# <DivR=10>      Radial division
# <Len=2>          Length
# <DivL=50>      Longitudinal division
# <BiasL=4>      Longitudinal bias
# <Etyp='qu8cr'>  Element type

# geometry
pnt p1 0 0 0
swep all rad tra <Dia/2.> 0 0 <DivR>
seta bottom se all
swep all top tra 0 <Len> 0 <DivL>

# meshing
enq all vertlines rect _ <Len/2.> 0 0.1
comp vertlines up
bia vertlines <BiasL>
flip all
elty all <Etyp>
mesh all
send all abq

# symmetry axis
seta nodes n all
enq nodes sym rec  0 _ 0 0.001
comp sym down

send all abq nam

# display of sets
rot -z
frame
tra l <Dia/2.>
plot la all
plus sa all
plus pa all
hcpy png
sys mv hcpy_1.png zug-geo.png

ulin Sets: top (blue), sym (green), bottom (turq)
view elem
plot f all n
plus n top b 8
plus n bottom t 8
plus n sym g 6


hcpy png
sys mv hcpy_2.png zug-sets.png
# END OF SCRIPT
