sys ccx MS
read MS.frd
read MS.inp nom
# plot model
seta ! all
hcpy png
sys mv hcpy_1.png mesh.png
# plot mode shapes
seta path n 1 3 5
ds 1 e 1
graph path length
ds 2 e 1
graph path length

graph response time PDISP MAG1
graph response time PDISP PHA1

sys gnuplot V.gnu
sys mv modes.png modes0.png
sys mv V.png V0.png
