read element.frd new
rot -z
view elem
view edge off
seta ! all
hcpy png
sys mv hcpy_1.png element-mesh.png

ds -1 e 1
view disp
scal d 500
frame
zoom 1.1
plot fv all
hcpy png
sys mv hcpy_2.png element-sx.png
