**
**   Structure: Cantilever beam under tensile forces
**   Test objective: Material card *CREEP
**
*HEADING
Model: beam     Date: 10-Mar-1998
*NODE
     1,      0.000000,      0.000000,      0.000000
     2,      1.000000,      0.000000,      0.000000
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*ELEMENT, TYPE=C3D20R   , ELSET=B1
     1,     1,    10,    95,    19,    61,   105,   222,   192,     9,    93,
           94,    20,   104,   220,   221,   193,    62,   103,   219,   190
     2,    10,     2,    13,    95,   105,    34,   134,   222,    11,    12,
           96,    93,   106,   133,   223,   220,   103,    33,   132,   219
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*NSET, NSET=CN7
    97,    96,    95,    94,    93,    20
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*Nset, nset=monitor
100
*BOUNDARY
CN7,3,3
1,1,2
2,2,2
*ELSET,ELSET=EALL,GENERATE
1,32
*NSET,NSET=NALL,GENERATE
1,261
*Material, name=AZ91
*Elastic
44300., 0.33
*Creep
 4.38e-18,  7.27, -0.47
*Density
 1.74e-09,

*MATERIAL,NAME=HY
*ELASTIC
210000.,.3
*PLASTIC
0.,0.
0.,10.
*CREEP
1.e-10,5.,0.
*SOLID SECTION,ELSET=EALL,MATERIAL=AZ91
*NSET,NSET=LAST
5,6,7,8,22,25,28,31,100
*SURFACE, NAME=Sload
29, S2
30, S2
32, S2
31, S2
*node
1000, 0.5,0.5,10.0
*coupling,ref node=1000,surface=Sload,constraint name=c1
*distributing
1,6
*STEP,INC=1000,NLGEOM
*VISCO,CETOL=8.e-4
10, 24000, 1, 1000
*CLOAD
1000,3,82
** *dsLOAD
** Sload,P,-82
*NODE file
U, rf
*EL file
S,PE
*node print, nset=monitor
U
*node print, nset=cn7, totals=yes
RF
*END STEP
