read Biegung.frd
read double.nam inp
read single.nam inp
read upper.nam inp
read lower.nam inp
seta Esand se Elower Eupper Esingle Edouble
comp Esand do
rot -z
rot c 45
rot d 60
view back
frame
zoom 1.5
view disp
# Equivalent strain
ds -0 e 1
plot ev Edouble
plus ev Esingle
hcpy png
sys mv hcpy_1.png PE-core.png
plot fv Esand
hcpy png
sys mv hcpy_2.png PE.png
# Equivalent stress
ds -1 e 7
plot ev Edouble
plus ev Esingle
hcpy png
sys mv hcpy_3.png SE-core.png
plot fv Esand
hcpy png
sys mv hcpy_4.png SE.png
# Force-displacement curve
sys dat2txt.py Biegung
sys mv "total force fx,fy,fz_NCYL1.txt" f.txt
sys mv "displacements vx,vy,vz_NMON1.txt" d.txt
sys join f.txt d.txt > df.txt
sys gnuplot df.gnu
