read Zug.frd

# verify constraints

frame

rot -x
rot c -90
rot r 30
rot u 30
plot fv all
view disp
view elem
view sh
ulin Displacement in x (normal to section)
ds -3 e 1

frame
hcpy png
sys mv hcpy_1.png dx.png
ulin Displacement in y (lateral)
ds -3 e 2
frame
hcpy png
sys mv hcpy_2.png dy.png
