sys gmsh Welle.geo
read mesh.inp
zap +CPS6
comp s* do
send s1 abq sur
send s2 abq sur
send all abq
# image
ulin bearing surfaces (red and blue)
view elem
plot f all n
plus f s1 r
plus f s2 b
frame
hcpy png
sys mv hcpy_1.png Refs/mesh.png

sys ccx solve

read solve.frd new

# ref node plots, nodes are defined in the INP file
ulin Ref nodes
plot n r1 r 10
plus n r2 b 10
hcpy png
sys mv hcpy_1.png Refs/refnodes.png

# movie counter
valu counter 0
# number of modes
valu num 20
# increment for modes
valu incr 1
# file extension for movies
valu ext .gif
# file prefix for movies
valu topre Refs/shape_
# show undeformed model edges
anim model
# loop over movies
while counter < num
  valu counter + counter incr
  # convert counter value to integer
  valu counter int counter
  text Mode counter
  # build output file name from prefix, counter and extension
  valu to & topre counter
  valu to & to ext
  # make sure that the frequency is correctly displayed
  ds counter e 4
  # write 11 frames from the output of the subsequent command
  movi frames 11
  ds counter a 4
  # store the file under the target name
  sys mv movie.gif to
endwhile
