read Tjoint.frd new
read contact.fbd

ds -1 e 7
view disp
view elem
scal d 20

seta base all
copy all new mir x
copy all new mir z
comp new do

frame
rot -z
zoom 4
rot r 6
rot u 6
tra u 20

# stress plot
ulin contact: contact
plot f new n
view sh off
plus fv base
max 3000 f
min 0 f
steps 20

valu name -SE.png
valu name & contact name
hcpy png
sys mv hcpy_1.png name

# displacement plot
valu name -D2.png
valu name & contact name
steps 10
ds -2 e 2
max 0.5 f
min -0.5 f
plot f all n
plus fv base
hcpy png
sys mv hcpy_2.png name
