*include, input=all.msh
*include, input=hist.nam
*include, input=path.nam
*boundary
*include, input=ysym_2.bou
*include, input=zsym_3.bou
*include, input=x0_1.bou
** material definition
*material, name=steel
*elastic
210000,0.333333333,0
*density
7.85e-9
*expansion
12e-6
*conductivity
50.,0
*specific heat
5e8,0
*solid section, elset=Eall, material=steel
** initial temperature
*initial conditions, type=temperature
Nall,0
*step
*COUPLED TEMPERATURE-DISPLACEMENT, direct
0.01,0.5
*amplitude, name=excite
0,0, 0.02,0, 0.04,1, 0.24,1
0.26,0
*dflux,amplitude=excite
*include, input=excite.dfl
*node file
NT,U
*el file
S
*end step
