# 1d heat conduction, steady state, using plane elements

valu lx 3
valu ly 1
valu lz 1

pnt p1 0 0 0
swep all new tra lx 0 0 3
swep all new tra 0 ly 0 1

elty all qu4s
mesh all
flip all
send all abq

# sets
seta nodes n all
enq nodes x0 rec 0 _ _ 0.01
comp x0 do
send x0 abq nam
send x0 abq sur

enq nodes xL rec lx _ _ 0.01
comp xL do
send xL abq sur

enq nodes yz0 rec _ 0
0 0.01
send yz0 abq nam

# mesh plot
rot -z
plot fb all n 20
frame all
plus fa all
plus fa x0 r 5
plus fa xL b 5
plus na all b
plus ea all
view line
view elem
frame all
hcpy png mesh2d

view fill

# thickness
sys echo lz > thickness.inp

# PATH
seto centerline
pnt start 0 0. 0
swep centerline centerline tra lx 0 0 60
setc centerline

# 2D standard
sys ccx solve2d

read solve2d.frd
ds -0 e 1
hcpy png q-2d

graph centerline length

# 3D non-averaged
sys separate.py all.msh
sys ccx solve2d_sep

read solve2d_sep.frd
ds -0 e 1
hcpy png q-2d-noavg

graph centerline length

# create combined path plot
sys gnuplot path2d.gnu
